# Задание 1
8 - 24/6 + 5.4 = 9.4
8 - 24/6 + 5.4 = 9.4
# Задание 2
5*(1 + (2 + (3 + (4 + 5)))) = 75
# Задание 3
sqrt(121) = 11
|-39.75| = 39.75
10! = 3628800
# Задание 4
sqrt(-6) = 2.44949i
|3 + 4i| = 5
(1 + 2i) - (-5 + 10i) = 6 - 8i
# Задание 5
t := 2.5
g := 9.81
g*t^2/2 = 30.6562
# Задание 6
x := 1.7
((x - 5)/(x^2 + 3*x + 2) - (x - 5)/(x^2 + 5*x + 6))*(x^2 + 4*x + 3)/(2*x - 10) = 0.27027
