# Задание 9
(d/dx(sin(x))) → cos(x)
d^2/dx^2(sin(x)) → -sin(x)
integral(1/x^3, x = a .. ∞) → {
    ∞ if a == 0
    1/(2*a^2) if a == 1 or a ≠ 0 and a ≥ 0
}
integral(ln(x), x) → x*(ln(x) - 1)
sum(i, i = 1 .. 10) = 55
sum(i, i = 1 .. 10) → 55
product(i, i = 1 .. 30) = 2.65253e32
limit((1 + 3*x)/x, x → ∞) → 3
limit(1/x, x → 0+) → ∞
limit(1/x, x → 0-) → -∞
# Задание 10
1 == 1 = 1
7 == 7 = 1
5 < 1 = 0
3 > 3 = 0
2 == 3 = 0
0 ≠ 0 = 0
3 < ∞ = 1
3 ≥ 3 = 1
