# Задание 1
i := 0 .. 15
x[i] := i*0.5
y[i] := sin(x[i])
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# Задание 2
i := 0 .. 50
x[i] := i*0.2
y[i] := sin(x[i])
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# Задание 3
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# Задание 4
z := [
    1, 1, 0, 1.1, 1.2;
    1, 2, 3, 2.1, 1.5;
    1.3, 3.3, 5, 3.7, 2;
    1.3, 3, 5.7, 4.1, 2.9;
    1.5, 2, 6.5, 4.8, 4
]
# [component: inputs z]
# [component: inputs z]
# [component: inputs z]
# [component: inputs z]
# [component: inputs z]
# [component: inputs z]
