# Задание 11
sin(k*x^2 + b*x)
cos(k*x^2 + b*x)*(b + 2*k*x)
sqrt(π)*(FresnelS(sqrt(2)*(b/2 + k*x)*sqrt(1/k)/sqrt(π))*cos(b^2/(4*k)) - FresnelC(sqrt(2)*(b/2 + k*x)*sqrt(1/k)/sqrt(π))*sin(b^2/(4*k)))*sqrt(1/(2*k))
# Задание 12
x^n
x^(n + 1)/(n + 1) if n ≠ -1
ln(x) if n == -1
integral(x^n, x) → x^(n + 1)/(n + 1)
# Задание 13
sin(k*x^2 + b*x)
b*x + k*x^2 - b^3*x^3/6 - b^2*k*x^4/2 + x^5*(b*(b^4/120 - k^2/6) - b*k^2/3) + x^6*(b^4*k/30 + k*(b^4/120 - k^2/6))
