# Задание 10
sum(2^i, i = 0 .. 10) = 2047
sum(2^i, i = 0 .. 10) → 2047
sum(a^i, i = 0 .. ∞) → {
    -1/(a - 1) if a ≠ 1 and |a| < 1
    ∞ if 1 ≤ a
}
sum(x^n/(2^n*n!), n = 0 .. ∞) → e^(x/2)
sum(1^n/(2^n*n!), n = 9 .. ∞) → sqrt(e) - 17017969/10321920 = 5.66417e-9
sum(1^n/(2^n*n!), n = 0 .. 100) = 1.64872
product(1^n/(2^n*n!), n = 0 .. ∞) → 0
product(sqrt(n), n = 1 .. ∞) → ∞
