# Задание 10
f(x, y) := x^4 + y^2 - 3
q(x, y) := x + 2*y
x := 1
y := 1
Given
f(x, y) == 0
q(x, y) == 0
Find(x, y) = [1.26947; -0.634735]
x := 1
y := 1
Given
x^4 + y^2 == 3
x + 2*y == 0
x < 0
Find(x, y) = [-1.26947; 0.634735]
