# Задание 16
a := [145; 210; 160]
b := [237; 278]
M := rows(a)
N := rows(b)
M = 3
N = 2
sum(b[i], i = 0 .. 1) = 515
sum(a[j], j = 0 .. 2) = 515
c := [11.5, 7, 12; 6.2, 10, 9]
f(x) := sum(sum(c[i, j]*x[i, j], j = 0 .. M - 1), i = 0 .. N - 1)
CTOL := 0.5
x[N - 1, M - 1] := 0
Given
x[0, 0] + x[1, 0] == a[0]
x[0, 0] ≥ 0
x[1, 0] ≥ 0
x[0, 1] + x[1, 1] == a[1]
x[0, 1] ≥ 0
x[1, 1] ≥ 0
x[0, 2] + x[1, 2] == a[2]
x[0, 2] ≥ 0
x[1, 1] ≥ 0
x[0, 0] + x[0, 1] + x[0, 2] == b[0]
x[1, 0] + x[1, 1] + x[1, 2] == b[1]
sol := Minimize(f, x)
sol = [0, 210, 27; 145, 0, 133]
f(sol) = 3890
