# Задание 1
sin(2*x)
2*cos(x)*sin(x)
sin(2*x) expand → 2*cos(x)*sin(x)
# Задание 2
((x - 5)/(x^2 + 3*x + 2) - (x - 5)/(x^2 + 5*x + 6))*(x^2 + 4*x + 3)/(2*x - 10)
1/(x + 2)
((x - 5)/(x^2 + 3*x + 2) - (x - 5)/(x^2 + 5*x + 6))*(x^2 + 4*x + 3)/(2*x - 10) simplify → 1/(x + 2)
# Задание 3
x^4 - 16
(x - 2)*(x + 2)*(x^2 + 4)
x^4 - 16 factor → (x - 2)*(x + 2)*(x^2 + 4)
# Задание 4
28 factor → 2^2*7
x^2 + 2*y*x + 2*x*z + y^2 + 2*y*z + z^2 factor → (x + y + z)^2
# Задание 5
(x + 2*y)*z - z^2*y*(x + 5*y) + z
-5*z^2*y^2 + (2*z - x*z^2)*y + z + x*z
(x + 2*y)*z - z^2*y*(x + 5*y) + z
(z - y*z^2)*x + 2*y*z - 5*y^2*z^2 + z
(x + 2*y)*z - z^2*y*(x + 5*y) + z collect, x → (z - y*z^2)*x + 2*y*z - 5*y^2*z^2 + z
# Задание 6
(x + 2*y)*z - z^2*y*(x + 5*y) + z
[0; x + 2*y + 1; -5*y^2 - x*y]
(x + 2*y)*z - z^2*y*(x + 5*y) + z coeffs, x → [2*y*z - 5*y^2*z^2 + z; z - y*z^2]
# Задание 7
(11*x^2 + 9*x + 1)/(x^2 - 3*x + 2)
63/(x - 2) - 21/(x - 1) + 11
(11*x^2 + 9*x + 1)/(x^2 - 3*x + 2) parfrac, x → 63/(x - 2) - 21/(x - 1) + 11
# Задание 8
a*x^2
sin(k*y^2 + b*y)
sin(k*a^2*x^4 + b*a*x^2)
# Задание 9
nthroot((x - 2)^2, 3) - nthroot((x - 3)^2, 3) solve, x → -1.882*10^27
nthroot((x - 2)^2, 3) - nthroot((x - 3)^2, 3)
-1.882*10^27
