# Задание 13
f(x) := x^4 + 5*x^3 - 10*x
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x := -3
f(x) := x^4 + 5*x^3 - 10*x
Minimize(f, x) = -3.55183
x := -3.552
f(x) = -29.3714
x := 1
Minimize(f, x) = 0.745711
x := 0.746
f(x) = -5.07449
x := -1
Maximize(f, x) = -0.94388
x := -0.944
f(x) = 6.02796
