# Задание 7
f(x, y) := x^(2*y) + cos(x)*y
d^2/dx^2(f(x, y)) → 2*x^(2*y - 2)*y*(2*y - 1) - y*cos(x)
d^2/dy^2(f(x, y)) → 4*x^(2*y)*ln(x)^2
d/dx(d/dy(f(x, y))) → 2*x^(2*y)/x - sin(x) + 4*x^(2*y - 1)*y*ln(x)
x := 1
y := 0.1
d^2/dx^2(f(x, y)) = -0.21403
d^2/dy^2(f(x, y)) = 1.25598e-16
d/dx(d/dy(f(x, y))) = 1.15853
