# Задание 1
integral(sin(x), x = 0 .. π) = 2
# Задание 2
a := 2
integral(a*sin(x), x = 0 .. π) = 4
x := 1
integral(a*sin(x), a = 0 .. 10) = 42.0735
# Задание 3
integral(integral(e^(-(x^2 + y^2)), x = -∞ .. ∞), y = -∞ .. ∞) = 3.14159
integral(integral(e^(-(x^2 + y^2)), x = -∞ .. ∞), y = -∞ .. ∞) → π
# Задание 4
x := 0.01
d/dx(cos(x)*ln(x)) = 100.041
d/dx(cos(x)*ln(x)) → 100.041050976
# Задание 5
x := 0.1
d^2/dx^2(cos(x)*x^2) = 1.94012
d^2/dx^2(cos(x)*x^2) → 1.94012492224
d^5/dx^5(d^2/dx^2(sin(x))) = -0.995007
d^7/dx^7(sin(x)) → -0.995004165278
