# Задание 11
a := 10000  # Целые числа
b := 2.57285
c := 312.1  # Десятичные числа
d := 4.17*10^-23
f := 345.1*10^3  # Научный формат
# Задание 12
x := 2i + 4
x = 4 + 2i
y := 19.785j + 0.1
y = 0.1 + 19.785i
z := 23*e^0.1i
z = 22.8851 + 2.29617i
# Задание 13
I := 10 A
U := 12*V
U + I =  # error: This value has units: Current, but must have units: Potential.
R := U/I
R = 1.2 Ω
