# Задание 14
x := 3
A := [sin(x); x]
A = [0.14112; 3]
# Задание 15
s[0, 0] := [1; 2]
s[1, 0] := [3; 4]
s[0, 1] := [5; 6]
s[1, 1] := [7; 8]
s = [[1; 2], [5; 6]; [3; 4], [7; 8]]
s[1, 0][0] = 3
s[1, 0][1] = 4
s = [[1; 2], [5; 6]; [3; 4], [7; 8]]
# Задание 16
i := 0, 2 .. 8
s(i) := i^2 + 1
i = [0; 2; 4; 6; 8]
s(i) = [1; 5; 17; 37; 65]
sin(s(i)) = [0.841471; -0.958924; -0.961397; -0.643538; 0.826829]
i := 0 .. 3
j := 0 .. 5
C[i, j] := i + j
C = [0, 1, 2, 3, 4, 5; 1, 2, 3, 4, 5, 6; 2, 3, 4, 5, 6, 7; 3, 4, 5, 6, 7, 8]
