# Задание 15
f(x, y) := 2*(x - 5.07)^2 + (y - 10.03)^2 - 0.2*(x - 5.07)^3
x := 3
y := 3
# [component: inputs f]
# [component: inputs f]
Given
0 < x < 15
0 < y < 20
Minimize(f, x, y) = [5.07; 10.03]
x := 5.07
y := 10.03
f(x, y) = 0
